F := 4.7  # Тяговая сила ленты [кН]
V := 0.60  # Скорость грузовой цепи [м/с]
t := 100  # Шаг грузовой цепи [мм]
z := 7  # Число зубьев звездочки
L_r := 7  # Срок службы привода [лет]
L_c := 1  # Сменность работы
t_c := 6  # Продолжительность смены [ч]
# Расчет параметров двигателя
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N_р.м. := F*V = 2.82  # Требуемая мощность рабочей машины
η_з.п. := (0.93 + 0.95)/2  # КПД закрытой передачи;
η_о.п. := (0.92 + 0.94)/2  # открытой передачи
η_м. := 0.98  # муфты
η_п.к. := (0.99 + 0.995)/2  # одной пары подшипников качения
η := η_з.п.*η_о.п.*η_м.*η_п.к.^3 = 0.837584  # Общий КПД привода
N_р.д. := N_р.м./η = 3.36683  # Расчетная мощность двигателя [кВт]
# Выбранный двигатель:
# ТИП : АИР112МВ6
P := 4  # Номинальная мощность [кВт]
n_ном := 950  # Номинальная частота вращения [об/мин]
η_д := 83.4  # КПД
# Определение передаточного отношения привода
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n_р.о. := 60*1000*V/(z*t) = 51.4286  # Частота вращения приводного вала рабочей машины [об/мин]
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u := n_ном/n_р.о. = 18.4722  # Передаточное отношение привода
u_з.п. := 4.5  # Передаточное отношение закрытой передачи
u_о.п. := u/u_з.п. = 4.10494  # Передаточное отношение открытой передачи
# Кинематический расчет привода
# Определение силовых и кинематических параметров привода:
# (Б) - быстроходный вал двигателя
# (Т) - тихоходный вал двигателя
# (PO) - вал рабочего органа
# Мощность N, кВт
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# Двигателя
N_д := P = 4
Б
N_1 := N_д*η_м.*η_п.к. = 3.8906
Т
N_2 := N_1*η_з.п.*η_п.к. = 3.62974
РО
N_РО := N_2*η_о.п.*η_п.к. = 3.35034
# Частота вращения n, мин^-1
# Двигателя
n_ном = 950
Б
n_1 := n_ном = 950
Т
n_2 := n_1/u_з.п. = 211.111
РО
n_р.о. := n_2/u_о.п. = 51.4286
# Угловая скорость ω, c^-^1
# Двигателя
ω_ном := π*n_ном/30 = 99.4838
Б
ω_1 := ω_ном = 99.4838
Т
ω_2 := ω_1/u_з.п. = 22.1075
РО
ω_РО := ω_2/u_о.п. = 5.38559
# Вращающий момент T, Нм
# Двигателя
T_д := N_д*10^3/ω_ном = 40.2076
Б
T_1 := T_д*η_м.*η_п.к. = 39.1079
Т
T_2 := T_1*u_з.п.*η_з.п.*η_п.к. = 164.186
РО
T_РО := T_2*u_о.п.*η_о.п.*η_п.к. = 622.093
